# OpenSim document version 20302
Model subject01:
  length_units: meters
  force_units: N
  gravity: 0 -9.80665 0
  credits:
    Delp S.L., Loan J.P., Hoy M.G., Zajac F.E., Topp E.L., Rosen J.M., Thelen D.G., Anderson F.C., Seth A.
  publications:
    Notes: 3D, 23 DOF gait model created by D.G. Thelen, Univ. of Wisconsin-Madison, and Ajay Seth, Frank C. Anderson, and Scott L. Delp, Stanford University. Lower extremity joint definitions based on Delp et al. (1990). Low back joint and anthropometry based on Anderson and Pandy (1999, 2001). Planar knee model of Yamaguchi and Zajac (1989). Seth removed the patella to avoid kinematic constraints; insertions of the quadrucepts are handled with moving points in the tibia frame. Number of muscles was reduced by Anderson to improve simulation speed for demonstrations and is not intended to be used in research.
    Delp, S.L., Loan, J.P., Hoy, M.G., Zajac, F.E., Topp E.L., Rosen, J.M.: An interactive graphics-based model of the lower extremity to study orthopaedic surgical procedures, IEEE Transactions on Biomedical Engineering, vol. 37, pp. 757-767, 1990.
    Yamaguchi G.T., Zajac F.E.: A planar model of the knee joint to characterize the knee extensor mechanism." J . Biomecl7. vol. 21. pp. 1-10. 1989.
    Anderson F.C., Pandy M.G.: A dynamic optimization solution for vertical jumping in three dimensions. Computer Methods in Biomechanics and Biomedical Engineering 2:201-231, 1999.
    Anderson F.C., Pandy M.G.: Dynamic optimization of human walking. Journal of Biomechanical Engineering 123:381-390, 2001.
  ForceSet:
    Thelen2003Muscle [values shared by the 54 below unless stated]: min_control=0.01 max_control=1 optimal_force=1
        max_contraction_velocity=10 activation_time_constant=0.01 deactivation_time_constant=0.04 Vmax=10 Vmax0=5
        FmaxTendonStrain=0.033 FmaxMuscleStrain=0.6 KshapeActive=0.5 KshapePassive=4 damping=0.05 Af=0.3 Flen=1.8
    Thelen2003Muscle glut_med1_r: max_isometric_force=1119 optimal_fiber_length=0.05640635
        tendon_slack_length=0.08223729 pennation_angle_at_optimal=0.1396263
      PathPoint P1: pelvis (-0.04180274 0.03114714 0.1238714)
      PathPoint P2: femur_r (-0.02500983 -0.01342271 0.06367182)
    Thelen2003Muscle glut_med2_r: max_isometric_force=873 optimal_fiber_length=0.08913177
        tendon_slack_length=0.05590513 pennation_angle_at_optimal=0
      PathPoint P1: pelvis (-0.08760134 0.04559368 0.0784826)
      PathPoint P2: femur_r (-0.02959879 -0.00665399 0.06045955)
    Thelen2003Muscle glut_med3_r: max_isometric_force=1000 optimal_fiber_length=0.06853064
        tendon_slack_length=0.05622483 pennation_angle_at_optimal=0.3316126
      PathPoint P1: pelvis (-0.1253058 0.01075806 0.06639259)
      PathPoint P2: femur_r (-0.03544972 -0.00539203 0.05942703)
    Thelen2003Muscle bifemlh_r: max_isometric_force=2700 optimal_fiber_length=0.1236311 tendon_slack_length=0.369759
        pennation_angle_at_optimal=0
      PathPoint P1: pelvis (-0.1290557 -0.1050909 0.07114663)
      PathPoint P2: tibia_r (-0.02975454 -0.03558683 0.02909223)
      PathPoint P3: tibia_r (-0.02313144 -0.05565384 0.03390634)
    Thelen2003Muscle bifemsh_r: max_isometric_force=804 optimal_fiber_length=0.1914449 tendon_slack_length=0.09848899
        pennation_angle_at_optimal=0.4014257
      PathPoint P1: femur_r (0.0057362 -0.2421824 0.02684542)
      PathPoint P2: tibia_r (-0.02975454 -0.03558683 0.02909223)
      PathPoint P3: tibia_r (-0.02313144 -0.05565384 0.03390634)
    Thelen2003Muscle sar_r: max_isometric_force=156 optimal_fiber_length=0.5742156 tendon_slack_length=0.1104261
        pennation_angle_at_optimal=0
      PathPoint P1: pelvis (-0.01567603 -0.00133195 0.1272525)
      PathPoint P2: femur_r (-0.00344172 -0.4093352 -0.0482988)
      PathPoint P3: tibia_r (-0.00553573 -0.04141911 -0.03944207)
      PathPoint P4: tibia_r (0.00593114 -0.058224 -0.03786043)
      PathPoint P5: tibia_r (0.02402111 -0.08303593 -0.02491078)
    Thelen2003Muscle add_mag2_r: max_isometric_force=2343 optimal_fiber_length=0.1409897 tendon_slack_length=0.1398245
        pennation_angle_at_optimal=0.05235988
      PathPoint P1: pelvis (-0.08514235 -0.1221296 0.03155697)
      PathPoint P2: femur_r (0.0061951 -0.2621443 0.02604235)
    Thelen2003Muscle tfl_r: max_isometric_force=233 optimal_fiber_length=0.1060379 tendon_slack_length=0.4743801
        pennation_angle_at_optimal=0.05235988
      PathPoint P1: pelvis (-0.03186435 0.02192595 0.12715)
      PathPoint P2: femur_r (0.03372886 -0.1141504 0.06849023)
      PathPoint P3: femur_r (0.0061951 -0.4645175 0.04095647)
      PathPoint P4: tibia_r (0.00593114 -0.04814107 0.02935913)
    Thelen2003Muscle pect_r: max_isometric_force=266 optimal_fiber_length=0.1116559 tendon_slack_length=0.03684646
        pennation_angle_at_optimal=0
      PathPoint P1: pelvis (-0.04415927 -0.07868752 0.04620842)
      PathPoint P2: femur_r (-0.01399633 -0.09430313 0.02902517)
    Thelen2003Muscle grac_r: max_isometric_force=162 optimal_fiber_length=0.3965859 tendon_slack_length=0.1419597
        pennation_angle_at_optimal=0.05235988
      PathPoint P1: pelvis (-0.07582895 -0.1216173 0.02862668)
      ConditionalPathPoint P2: tibia_r (-0.02626506 -0.03153388 -0.03730686) range=(-0.4363323 0.1745329)
          coordinate=knee_angle_r
      PathPoint P3: tibia_r (-0.019207 -0.05093859 -0.03538912)
      PathPoint P4: tibia_r (0.00593114 -0.08264052 -0.02253832)
    Thelen2003Muscle glut_max1_r: max_isometric_force=573 optimal_fiber_length=0.151587 tendon_slack_length=0.1334393
        pennation_angle_at_optimal=0.08726646
      PathPoint P1: pelvis (-0.122437 0.06270411 0.07172039)
      PathPoint P2: pelvis (-0.1322729 0.00122949 0.09077753)
      PathPoint P3: femur_r (-0.05242887 -0.02845155 0.04497181)
      PathPoint P4: femur_r (-0.03177855 -0.06493378 0.05392028)
    Thelen2003Muscle glut_max2_r: max_isometric_force=819 optimal_fiber_length=0.1593947 tendon_slack_length=0.1377084
        pennation_angle_at_optimal=0
      PathPoint P1: pelvis (-0.1382154 0.01803256 0.05768369)
      PathPoint P2: pelvis (-0.1409818 -0.05327801 0.09364634)
      PathPoint P3: femur_r (-0.04887242 -0.06080372 0.03361413)
      PathPoint P4: femur_r (-0.01789694 -0.1165596 0.04806936)
    Thelen2003Muscle glut_max3_r: max_isometric_force=552 optimal_fiber_length=0.1562884 tendon_slack_length=0.1573737
        pennation_angle_at_optimal=0.08726646
      PathPoint P1: pelvis (-0.1594242 -0.03217172 0.00594255)
      PathPoint P2: pelvis (-0.1566578 -0.1077855 0.04129045)
      PathPoint P3: femur_r (-0.03430248 -0.1194277 0.01548774)
      PathPoint P4: femur_r (-0.00688344 -0.1627934 0.04715156)
    Thelen2003Muscle iliacus_r: max_isometric_force=1073 optimal_fiber_length=0.1061641 tendon_slack_length=0.1061641
        pennation_angle_at_optimal=0.1221731
      PathPoint P1: pelvis (-0.06905649 0.03739706 0.08749888)
      PathPoint P2: pelvis (-0.02643409 -0.05635174 0.0830932)
      ConditionalPathPoint P3: pelvis (-0.02950782 -0.08247845 0.08360549) range=(-1.570796 0.7853982)
          coordinate=hip_flexion_r
      PathPoint P4: femur_r (0.00195031 -0.06229513 0.00653927)
      PathPoint P5: femur_r (-0.02214173 -0.0712436 0.0147994)
    Thelen2003Muscle psoas_r: max_isometric_force=1113 optimal_fiber_length=0.1051723 tendon_slack_length=0.1682757
        pennation_angle_at_optimal=0.1396263
      PathPoint P1: pelvis (-0.06629013 0.09087998 0.02961028)
      PathPoint P2: pelvis (-0.02438493 -0.05840089 0.0777654)
      ConditionalPathPoint P3: pelvis (-0.02950782 -0.08247845 0.08360549) range=(-1.570796 0.7853982)
          coordinate=hip_flexion_r
      PathPoint P4: femur_r (0.00183558 -0.05816507 0.00435951)
      PathPoint P5: femur_r (-0.02156811 -0.06849023 0.0119313)
    Thelen2003Muscle quad_fem_r: max_isometric_force=381 optimal_fiber_length=0.05807418 tendon_slack_length=0.02581075
        pennation_angle_at_optimal=0
      PathPoint P1: pelvis (-0.1171092 -0.1179288 0.05327801)
      PathPoint P2: femur_r (-0.04370984 -0.04118592 0.04198898)
    Thelen2003Muscle gem_r: max_isometric_force=164 optimal_fiber_length=0.02609439 tendon_slack_length=0.04240338
        pennation_angle_at_optimal=0
      PathPoint P1: pelvis (-0.1160846 -0.08401532 0.0731548)
      PathPoint P2: femur_r (-0.01629081 -0.00378589 0.05082273)
    Thelen2003Muscle peri_r: max_isometric_force=444 optimal_fiber_length=0.02732926 tendon_slack_length=0.1208794
        pennation_angle_at_optimal=0.1745329
      PathPoint P1: pelvis (-0.1430309 0.00030737 0.02407756)
      PathPoint P2: pelvis (-0.122232 -0.02827833 0.06731471)
      PathPoint P3: femur_r (-0.01697915 -0.00413006 0.05013439)
    Thelen2003Muscle rect_fem_r: max_isometric_force=1169 optimal_fiber_length=0.1304624 tendon_slack_length=0.354766
        pennation_angle_at_optimal=0.08726646
      PathPoint P1: pelvis (-0.03022502 -0.03186435 0.09917906)
      ConditionalPathPoint P2: femur_r (0.03831782 -0.4623377 0.00217976) range=(-2.617994 -1.459968)
          coordinate=knee_angle_r
      MovingPathPoint P3: tibia_r (0.06104876 0.02074319 0.00138393) x_coordinate=knee_angle_r
          y_coordinate=knee_angle_r z_coordinate=knee_angle_r
        x_location: NaturalCubicSpline: x=(-2.094395 -1.999973 -1.570796 -1.457524 -1.396263 -1.047198 -0.6981317 -0.5263913 -0.3490659 -0.1745329 0 0.00017453 0.00034907 0.02792527 0.08726646 0.1745329 2.094395)
            y=(0.01540168 0.01778731 0.02719239 0.02931599 0.0304085 0.03614982 0.04172301 0.04457268 0.04783562 0.05281671 0.06104876 0.06105797 0.0610672 0.06258172 0.06622507 0.07246216 0.05668989)
        y_location: NaturalCubicSpline: x=(-2.094395 -1.999973 -1.570796 -1.457524 -1.396263 -1.047198 -0.6981317 -0.5263913 -0.3490659 -0.1745329 0 0.00017453 0.00034907 0.02792527 0.08726646 0.1745329 2.094395)
            y=(0.02314293 0.0234886 0.0248259 0.02498935 0.02502409 0.02463241 0.02395914 0.02357106 0.02315093 0.02250313 0.02074319 0.02074062 0.02073806 0.02028694 0.01895534 0.01577232 -0.06660408)
        z_location: NaturalCubicSpline: x=(-2.0944 0.1745) y=(0.00138393 0.00138393)
    Thelen2003Muscle vas_int_r: max_isometric_force=5000 optimal_fiber_length=0.1246787 tendon_slack_length=0.1351657
        pennation_angle_at_optimal=0.05235988
      PathPoint P1: femur_r (0.03326996 -0.220729 0.03556444)
      PathPoint P2: femur_r (0.03843254 -0.2390848 0.03269634)
      ConditionalPathPoint P3: femur_r (0.03935033 -0.4623377 0.00630982) range=(-2.617994 -1.42)
          coordinate=knee_angle_r
      MovingPathPoint P4: tibia_r (0.05482667 0.02500204 0.00177934) x_coordinate=knee_angle_r
          y_coordinate=knee_angle_r z_coordinate=knee_angle_r
        x_location: NaturalCubicSpline: x=(-2.094395 -1.999973 -1.570796 -1.457524 -1.396263 -1.047198 -0.6981317 -0.5263913 -0.3490659 -0.1745329 0 0.00017453 0.00034907 0.02792527 0.08726646 0.1745329 2.094395)
            y=(0.00817834 0.01056397 0.01997228 0.02209643 0.02318904 0.02893557 0.0345454 0.03743639 0.04078339 0.04599468 0.05482667 0.05483679 0.05484692 0.05651553 0.06056877 0.0676514 0.0641371)
        y_location: NaturalCubicSpline: x=(-2.094395 -1.999973 -1.570796 -1.457524 -1.396263 -1.047198 -0.6981317 -0.5263913 -0.3490659 -0.1745329 0 0.00017453 0.00034907 0.02792527 0.08726646 0.1745329 2.094395)
            y=(0.02530524 0.02565091 0.02699894 0.02716426 0.02719932 0.02682484 0.0262687 0.02600533 0.02581893 0.02571437 0.02500204 0.0250008 0.02499956 0.02476505 0.02394117 0.02157825 -0.06778357)
        z_location: NaturalCubicSpline: x=(-2.0944 2.0944) y=(0.00177934 0.00177934)
    Thelen2003Muscle med_gas_r: max_isometric_force=2500 optimal_fiber_length=0.0901287 tendon_slack_length=0.3605148
        pennation_angle_at_optimal=0.296706
      PathPoint P1: femur_r (-0.02179756 -0.4507506 -0.02696014)
      ConditionalPathPoint P2: femur_r (-0.0344172 -0.4614199 -0.02959879) range=(-0.7853982 0.1745329)
          coordinate=knee_angle_r
      PathPoint P3: calcn_r (0 0.03183963 -0.00544355)
    Thelen2003Muscle soleus_r: max_isometric_force=4000 optimal_fiber_length=0.08046208 tendon_slack_length=0.2212707
        pennation_angle_at_optimal=0.4363323
      PathPoint P1: tibia_r (-0.00237246 -0.1515406 0.00701851)
      PathPoint P2: calcn_r (0 0.03183963 -0.00544355)
    Thelen2003Muscle tib_post_r: max_isometric_force=3600 optimal_fiber_length=0.03107549 tendon_slack_length=0.3107549
        pennation_angle_at_optimal=0.2094395
      PathPoint P1: tibia_r (-0.00929212 -0.1332529 0.00187819)
      PathPoint P2: tibia_r (-0.01423473 -0.4004507 -0.02263718)
      PathPoint P3: calcn_r (0.04282943 0.03430463 -0.02937462)
      PathPoint P4: calcn_r (0.07929094 0.01633065 -0.02886108)
    Thelen2003Muscle tib_ant_r: max_isometric_force=3000 optimal_fiber_length=0.09791263 tendon_slack_length=0.2228012
        pennation_angle_at_optimal=0.08726646
      PathPoint P1: tibia_r (0.01769456 -0.1605361 0.01136801)
      PathPoint P2: tibia_r (0.03252241 -0.3905654 -0.01749686)
      PathPoint P3: calcn_r (0.1197581 0.01828211 -0.03132609)
    Thelen2003Muscle glut_med1_l: max_isometric_force=1119 optimal_fiber_length=0.05640635
        tendon_slack_length=0.08223729 pennation_angle_at_optimal=0.1396263
      PathPoint P1: pelvis (-0.04180274 0.03114714 -0.1238714)
      PathPoint P2: femur_l (-0.02500983 -0.01342271 -0.06367182)
    Thelen2003Muscle glut_med2_l: max_isometric_force=873 optimal_fiber_length=0.08913177
        tendon_slack_length=0.05590513 pennation_angle_at_optimal=0
      PathPoint P1: pelvis (-0.08760134 0.04559368 -0.0784826)
      PathPoint P2: femur_l (-0.02959879 -0.00665399 -0.06045955)
    Thelen2003Muscle glut_med3_l: max_isometric_force=1000 optimal_fiber_length=0.06853064
        tendon_slack_length=0.05622483 pennation_angle_at_optimal=0.3316126
      PathPoint P1: pelvis (-0.1253058 0.01075806 -0.06639259)
      PathPoint P2: femur_l (-0.03544972 -0.00539203 -0.05942703)
    Thelen2003Muscle bifemlh_l: max_isometric_force=2700 optimal_fiber_length=0.1236311 tendon_slack_length=0.369759
        pennation_angle_at_optimal=0
      PathPoint P1: pelvis (-0.1290557 -0.1050909 -0.07114663)
      PathPoint P2: tibia_l (-0.02975454 -0.03558683 -0.02909223)
      PathPoint P3: tibia_l (-0.02313144 -0.05565384 -0.03390634)
    Thelen2003Muscle bifemsh_l: max_isometric_force=804 optimal_fiber_length=0.1914449 tendon_slack_length=0.09848899
        pennation_angle_at_optimal=0.4014257
      PathPoint P1: femur_l (0.0057362 -0.2421824 -0.02684542)
      PathPoint P2: tibia_l (-0.02975454 -0.03558683 -0.02909223)
      PathPoint P3: tibia_l (-0.02313144 -0.05565384 -0.03390634)
    Thelen2003Muscle sar_l: max_isometric_force=156 optimal_fiber_length=0.5742156 tendon_slack_length=0.1104261
        pennation_angle_at_optimal=0
      PathPoint P1: pelvis (-0.01567603 -0.00133195 -0.1272525)
      PathPoint P2: femur_l (-0.00344172 -0.4093352 0.0482988)
      PathPoint P3: tibia_l (-0.00553573 -0.04141911 0.03944207)
      PathPoint P4: tibia_l (0.00593114 -0.058224 0.03786043)
      PathPoint P5: tibia_l (0.02402111 -0.08303593 0.02491078)
    Thelen2003Muscle add_mag2_l: max_isometric_force=2343 optimal_fiber_length=0.1409897 tendon_slack_length=0.1398245
        pennation_angle_at_optimal=0.05235988
      PathPoint P1: pelvis (-0.08514235 -0.1221296 -0.03155697)
      PathPoint P2: femur_l (0.0061951 -0.2621443 -0.02604235)
    Thelen2003Muscle tfl_l: max_isometric_force=233 optimal_fiber_length=0.1060379 tendon_slack_length=0.4743801
        pennation_angle_at_optimal=0.05235988
      PathPoint P1: pelvis (-0.03186435 0.02192595 -0.12715)
      PathPoint P2: femur_l (0.03372886 -0.1141504 -0.06849023)
      PathPoint P3: femur_l (0.0061951 -0.4645175 -0.04095647)
      PathPoint P4: tibia_l (0.00593114 -0.04814107 -0.02935913)
    Thelen2003Muscle pect_l: max_isometric_force=266 optimal_fiber_length=0.1116559 tendon_slack_length=0.03684646
        pennation_angle_at_optimal=0
      PathPoint P1: pelvis (-0.04415927 -0.07868752 -0.04620842)
      PathPoint P2: femur_l (-0.01399633 -0.09430313 -0.02902517)
    Thelen2003Muscle grac_l: max_isometric_force=162 optimal_fiber_length=0.3965859 tendon_slack_length=0.1419597
        pennation_angle_at_optimal=0.05235988
      PathPoint P1: pelvis (-0.07582895 -0.1216173 -0.02862668)
      ConditionalPathPoint P2: tibia_l (-0.02626506 -0.03153388 0.03730686) range=(-0.4363323 0.1745329)
          coordinate=knee_angle_l
      PathPoint P3: tibia_l (-0.019207 -0.05093859 0.03538912)
      PathPoint P4: tibia_l (0.00593114 -0.08264052 0.02253832)
    Thelen2003Muscle glut_max1_l: max_isometric_force=573 optimal_fiber_length=0.151587 tendon_slack_length=0.1334393
        pennation_angle_at_optimal=0.08726646
      PathPoint P1: pelvis (-0.122437 0.06270411 -0.07172039)
      PathPoint P2: pelvis (-0.1322729 0.00122949 -0.09077753)
      PathPoint P3: femur_l (-0.05242887 -0.02845155 -0.04497181)
      PathPoint P4: femur_l (-0.03177855 -0.06493378 -0.05392028)
    Thelen2003Muscle glut_max2_l: max_isometric_force=819 optimal_fiber_length=0.1593947 tendon_slack_length=0.1377084
        pennation_angle_at_optimal=0
      PathPoint P1: pelvis (-0.1382154 0.01803256 -0.05768369)
      PathPoint P2: pelvis (-0.1409818 -0.05327801 -0.09364634)
      PathPoint P3: femur_l (-0.04887242 -0.06080372 -0.03361413)
      PathPoint P4: femur_l (-0.01789694 -0.1165596 -0.04806936)
    Thelen2003Muscle glut_max3_l: max_isometric_force=552 optimal_fiber_length=0.1562884 tendon_slack_length=0.1573737
        pennation_angle_at_optimal=0.08726646
      PathPoint P1: pelvis (-0.1594242 -0.03217172 -0.00594255)
      PathPoint P2: pelvis (-0.1566578 -0.1077855 -0.04129045)
      PathPoint P3: femur_l (-0.03430248 -0.1194277 -0.01548774)
      PathPoint P4: femur_l (-0.00688344 -0.1627934 -0.04715156)
    Thelen2003Muscle iliacus_l: max_isometric_force=1073 optimal_fiber_length=0.1061641 tendon_slack_length=0.1061641
        pennation_angle_at_optimal=0.1221731
      PathPoint P1: pelvis (-0.06905649 0.03739706 -0.08749888)
      PathPoint P2: pelvis (-0.02643409 -0.05635174 -0.0830932)
      ConditionalPathPoint P3: pelvis (-0.02950782 -0.08247845 -0.08360549) range=(-1.570796 0.7853982)
          coordinate=hip_flexion_l
      PathPoint P4: femur_l (0.00195031 -0.06229513 -0.00653927)
      PathPoint P5: femur_l (-0.02214173 -0.0712436 -0.0147994)
    Thelen2003Muscle psoas_l: max_isometric_force=1113 optimal_fiber_length=0.1051723 tendon_slack_length=0.1682757
        pennation_angle_at_optimal=0.1396263
      PathPoint P1: pelvis (-0.06629013 0.09087998 -0.02961028)
      PathPoint P2: pelvis (-0.02438493 -0.05840089 -0.0777654)
      ConditionalPathPoint P3: pelvis (-0.02950782 -0.08247845 -0.08360549) range=(-1.570796 0.7853982)
          coordinate=hip_flexion_l
      PathPoint P4: femur_l (0.00183558 -0.05816507 -0.00435951)
      PathPoint P5: femur_l (-0.02156811 -0.06849023 -0.0119313)
    Thelen2003Muscle quad_fem_l: max_isometric_force=381 optimal_fiber_length=0.05807418 tendon_slack_length=0.02581075
        pennation_angle_at_optimal=0
      PathPoint P1: pelvis (-0.1171092 -0.1179288 -0.05327801)
      PathPoint P2: femur_l (-0.04370984 -0.04118592 -0.04198898)
    Thelen2003Muscle gem_l: max_isometric_force=164 optimal_fiber_length=0.02609439 tendon_slack_length=0.04240338
        pennation_angle_at_optimal=0
      PathPoint P1: pelvis (-0.1160846 -0.08401532 -0.0731548)
      PathPoint P2: femur_l (-0.01629081 -0.00378589 -0.05082273)
    Thelen2003Muscle peri_l: max_isometric_force=444 optimal_fiber_length=0.02732926 tendon_slack_length=0.1208794
        pennation_angle_at_optimal=0.1745329
      PathPoint P1: pelvis (-0.1430309 0.00030737 -0.02407756)
      PathPoint P2: pelvis (-0.122232 -0.02827833 -0.06731471)
      PathPoint P3: femur_l (-0.01697915 -0.00413006 -0.05013439)
    Thelen2003Muscle rect_fem_l: max_isometric_force=1169 optimal_fiber_length=0.1304624 tendon_slack_length=0.354766
        pennation_angle_at_optimal=0.08726646
      PathPoint P1: pelvis (-0.03022502 -0.03186435 -0.09917906)
      ConditionalPathPoint P2: femur_l (0.03831782 -0.4623377 -0.00217976) range=(-2.617994 -1.459968)
          coordinate=knee_angle_l
      MovingPathPoint P3: tibia_l (0.06104876 0.02074319 -0.00138393) x_coordinate=knee_angle_l
          y_coordinate=knee_angle_l z_coordinate=knee_angle_l
        x_location: NaturalCubicSpline: x=(-2.094395 -1.999973 -1.570796 -1.457524 -1.396263 -1.047198 -0.6981317 -0.5263913 -0.3490659 -0.1745329 0 0.00017453 0.00034907 0.02792527 0.08726646 0.1745329 2.094395)
            y=(0.01540168 0.01778731 0.02719239 0.02931599 0.0304085 0.03614982 0.04172301 0.04457268 0.04783562 0.05281671 0.06104876 0.06105797 0.0610672 0.06258172 0.06622507 0.07246216 0.05668989)
        y_location: NaturalCubicSpline: x=(-2.094395 -1.999973 -1.570796 -1.457524 -1.396263 -1.047198 -0.6981317 -0.5263913 -0.3490659 -0.1745329 0 0.00017453 0.00034907 0.02792527 0.08726646 0.1745329 2.094395)
            y=(0.02314293 0.0234886 0.0248259 0.02498935 0.02502409 0.02463241 0.02395914 0.02357106 0.02315093 0.02250313 0.02074319 0.02074062 0.02073806 0.02028694 0.01895534 0.01577232 -0.06660408)
        z_location: NaturalCubicSpline: x=(-2.0944 0.1745) y=(-0.00138393 -0.00138393)
    Thelen2003Muscle vas_int_l: max_isometric_force=5000 optimal_fiber_length=0.1246787 tendon_slack_length=0.1351657
        pennation_angle_at_optimal=0.05235988
      PathPoint P1: femur_l (0.03326996 -0.220729 -0.03556444)
      PathPoint P2: femur_l (0.03843254 -0.2390848 -0.03269634)
      ConditionalPathPoint P3: femur_l (0.03935033 -0.4623377 -0.00630982) range=(-2.617994 -1.42)
          coordinate=knee_angle_l
      MovingPathPoint P4: tibia_l (0.05482667 0.02500204 -0.00177934) x_coordinate=knee_angle_l
          y_coordinate=knee_angle_l z_coordinate=knee_angle_l
        x_location: NaturalCubicSpline: x=(-2.094395 -1.999973 -1.570796 -1.457524 -1.396263 -1.047198 -0.6981317 -0.5263913 -0.3490659 -0.1745329 0 0.00017453 0.00034907 0.02792527 0.08726646 0.1745329 2.094395)
            y=(0.00817834 0.01056397 0.01997228 0.02209643 0.02318904 0.02893557 0.0345454 0.03743639 0.04078339 0.04599468 0.05482667 0.05483679 0.05484692 0.05651553 0.06056877 0.0676514 0.0641371)
        y_location: NaturalCubicSpline: x=(-2.094395 -1.999973 -1.570796 -1.457524 -1.396263 -1.047198 -0.6981317 -0.5263913 -0.3490659 -0.1745329 0 0.00017453 0.00034907 0.02792527 0.08726646 0.1745329 2.094395)
            y=(0.02530524 0.02565091 0.02699894 0.02716426 0.02719932 0.02682484 0.0262687 0.02600533 0.02581893 0.02571437 0.02500204 0.0250008 0.02499956 0.02476505 0.02394117 0.02157825 -0.06778357)
        z_location: NaturalCubicSpline: x=(-2.0944 2.0944) y=(-0.00177934 -0.00177934)
    Thelen2003Muscle med_gas_l: max_isometric_force=2500 optimal_fiber_length=0.0901287 tendon_slack_length=0.3605148
        pennation_angle_at_optimal=0.296706
      PathPoint P1: femur_l (-0.02179756 -0.4507506 0.02696014)
      ConditionalPathPoint P2: femur_l (-0.0344172 -0.4614199 0.02959879) range=(-0.7853982 0.1745329)
          coordinate=knee_angle_l
      PathPoint P3: calcn_l (0 0.03183963 0.00544355)
    Thelen2003Muscle soleus_l: max_isometric_force=4000 optimal_fiber_length=0.08046208 tendon_slack_length=0.2212707
        pennation_angle_at_optimal=0.4363323
      PathPoint P1: tibia_l (-0.00237246 -0.1515406 -0.00701851)
      PathPoint P2: calcn_l (0 0.03183963 0.00544355)
    Thelen2003Muscle tib_post_l: max_isometric_force=3600 optimal_fiber_length=0.03107549 tendon_slack_length=0.3107549
        pennation_angle_at_optimal=0.2094395
      PathPoint P1: tibia_l (-0.00929212 -0.1332529 -0.00187819)
      PathPoint P2: tibia_l (-0.01423473 -0.4004507 0.02263718)
      PathPoint P3: calcn_l (0.04282943 0.03430463 0.02937462)
      PathPoint P4: calcn_l (0.07929094 0.01633065 0.02886108)
    Thelen2003Muscle tib_ant_l: max_isometric_force=3000 optimal_fiber_length=0.09791263 tendon_slack_length=0.2228012
        pennation_angle_at_optimal=0.08726646
      PathPoint P1: tibia_l (0.01769456 -0.1605361 -0.01136801)
      PathPoint P2: tibia_l (0.03252241 -0.3905654 0.01749686)
      PathPoint P3: calcn_l (0.1197581 0.01828211 0.03132609)
    Thelen2003Muscle ercspn_r: max_isometric_force=2500 optimal_fiber_length=0.1278847 tendon_slack_length=0.03197118
        pennation_angle_at_optimal=0
      PathPoint P1: pelvis (-0.1434408 0.04497893 0.04467156)
      PathPoint P2: torso (-0.05938459 0.1187692 0.02602125)
    Thelen2003Muscle ercspn_l: max_isometric_force=2500 optimal_fiber_length=0.1278847 tendon_slack_length=0.03197118
        pennation_angle_at_optimal=0
      PathPoint P1: pelvis (-0.1434408 0.04497893 -0.04467156)
      PathPoint P2: torso (-0.05938459 0.1187692 -0.02602125)
    Thelen2003Muscle intobl_r: max_isometric_force=900 optimal_fiber_length=0.106202 tendon_slack_length=0.106202
        pennation_angle_at_optimal=0
      PathPoint P1: pelvis (-0.04098308 0.07172039 0.1185436)
      PathPoint P2: torso (0.07558039 0.1727552 0.0161958)
    Thelen2003Muscle intobl_l: max_isometric_force=900 optimal_fiber_length=0.106202 tendon_slack_length=0.106202
        pennation_angle_at_optimal=0
      PathPoint P1: pelvis (-0.04098308 0.07172039 -0.1185436)
      PathPoint P2: torso (0.07558039 0.1727552 -0.0161958)
    Thelen2003Muscle extobl_r: max_isometric_force=900 optimal_fiber_length=0.1263775 tendon_slack_length=0.1474404
        pennation_angle_at_optimal=0
      PathPoint P1: pelvis (-0.03073731 -0.0651631 0.01024577)
      PathPoint P2: torso (0.07018179 0.1187692 0.1187692)
    Thelen2003Muscle extobl_l: max_isometric_force=900 optimal_fiber_length=0.1263775 tendon_slack_length=0.1474404
        pennation_angle_at_optimal=0
      PathPoint P1: pelvis (-0.03073731 -0.0651631 -0.01024577)
      PathPoint P2: torso (0.07018179 0.1187692 -0.1187692)
    ObjectGroup R_hip_abd: members=(glut_max1_r glut_med1_r glut_med2_r glut_med3_r peri_r sar_r tfl_r)
    ObjectGroup R_hip_flex: members=(glut_med1_r grac_r iliacus_r pect_r psoas_r rect_fem_r sar_r tfl_r)
    ObjectGroup R_hip_inrot: members=(glut_med1_r iliacus_r psoas_r tfl_r)
    ObjectGroup R_hip_exrot: members=(gem_r glut_med3_r peri_r quad_fem_r)
    ObjectGroup R_hip_ext: members=(add_mag2_r bifemlh_r glut_max1_r glut_max2_r glut_max3_r glut_med3_r)
    ObjectGroup R_hip_add: members=(add_mag2_r bifemlh_r grac_r pect_r)
    ObjectGroup R_knee_bend: members=(bifemlh_r bifemsh_r grac_r med_gas_r sar_r)
    ObjectGroup R_knee_ext: members=(rect_fem_r vas_int_r)
    ObjectGroup R_ankle_pf: members=(med_gas_r soleus_r tib_post_r)
    ObjectGroup R_inverter: members=(tib_ant_r tib_post_r)
    ObjectGroup R_ankle_df: members=tib_ant_r
    ObjectGroup L_hip_abd: members=(glut_max1_l glut_med1_l glut_med2_l glut_med3_l peri_l sar_l tfl_l)
    ObjectGroup L_hip_flex: members=(glut_med1_l grac_l iliacus_l pect_l psoas_l rect_fem_l sar_l tfl_l)
    ObjectGroup L_hip_inrot: members=(glut_med1_l iliacus_l psoas_l tfl_l)
    ObjectGroup L_hip_exrot: members=(gem_l glut_med3_l peri_l quad_fem_l)
    ObjectGroup L_hip_ext: members=(add_mag2_l bifemlh_l glut_max1_l glut_max2_l glut_max3_l glut_med3_l)
    ObjectGroup L_hip_add: members=(add_mag2_l bifemlh_l grac_l pect_l)
    ObjectGroup L_knee_bend: members=(bifemlh_l bifemsh_l grac_l med_gas_l sar_l)
    ObjectGroup L_knee_ext: members=(rect_fem_l vas_int_l)
    ObjectGroup L_ankle_pf: members=(med_gas_l soleus_l tib_post_l)
    ObjectGroup L_inverter: members=(tib_ant_l tib_post_l)
    ObjectGroup L_ankle_df: members=tib_ant_l
    ObjectGroup back_ext: members=(ercspn_l ercspn_r)
    ObjectGroup back_rlb: members=(ercspn_r extobl_r intobl_r)
    ObjectGroup back_introt: members=(ercspn_r extobl_l intobl_r)
    ObjectGroup back_llb: members=(ercspn_l extobl_l intobl_l)
    ObjectGroup back_extrot: members=(ercspn_l extobl_r intobl_l)
    ObjectGroup back_flex: members=(extobl_l extobl_r intobl_l intobl_r)
  BodySet:
    Body ground: mass=0 mass_center=(0 0 0) inertia_xx=0 inertia_yy=0 inertia_zz=0 meshes=treadmill.vtp
    Body pelvis: mass=11.37517 mass_center=(-0.0724376 0 0) inertia_xx=0.1042331 inertia_yy=0.08831422
        inertia_zz=0.05870716 meshes=(sacrum.vtp pelvis.vtp l_pelvis.vtp)
      CustomJoint ground_pelvis: parent_body=ground location_in_parent=(0 0 0) location=(0 0 0)
        Coordinate pelvis_tilt: motion_type=rotational default_value=0 initial_value=0 range=(-1.570796 1.570796)
            clamped=true
        Coordinate pelvis_list: motion_type=rotational default_value=0 initial_value=0 range=(-1.570796 1.570796)
            clamped=true
        Coordinate pelvis_rotation: motion_type=rotational default_value=0 initial_value=0 range=(-1.570796 1.570796)
            clamped=true
        Coordinate pelvis_tx: motion_type=translational default_value=0 initial_value=0 range=(-5 5) clamped=true
        Coordinate pelvis_ty: motion_type=translational default_value=0.93 initial_value=0.93 range=(-1 2) clamped=true
        Coordinate pelvis_tz: motion_type=translational default_value=0 initial_value=0 range=(-3 3) clamped=true
        SpatialTransform:
          TransformAxis rotation1: coordinates=pelvis_tilt axis=(0 0 1) LinearFunction(coefficients=1 0)
          TransformAxis rotation2: coordinates=pelvis_list axis=(1 0 0) LinearFunction(coefficients=1 0)
          TransformAxis rotation3: coordinates=pelvis_rotation axis=(0 1 0) LinearFunction(coefficients=1 0)
          TransformAxis translation1: coordinates=pelvis_tx axis=(1 0 0) LinearFunction(coefficients=1 0)
          TransformAxis translation2: coordinates=pelvis_ty axis=(0 1 0) LinearFunction(coefficients=1 0)
          TransformAxis translation3: coordinates=pelvis_tz axis=(0 0 1) LinearFunction(coefficients=1 0)
    Body femur_r: mass=8.984038 mass_center=(0 -0.1950308 0) inertia_xx=0.1702207 inertia_yy=0.04462096
        inertia_zz=0.1795009 meshes=femur.vtp
      CustomJoint hip_r: parent_body=pelvis location_in_parent=(-0.0724376 -0.06772454 0.08555218) location=(0 0 0)
        Coordinate hip_flexion_r: motion_type=rotational default_value=0 initial_value=0 range=(-2.094395 2.094395)
            clamped=true
        Coordinate hip_adduction_r: motion_type=rotational default_value=0 initial_value=0 range=(-2.094395 2.094395)
            clamped=true
        Coordinate hip_rotation_r: motion_type=rotational default_value=0 initial_value=0 range=(-2.094395 2.094395)
            clamped=true
        SpatialTransform: axes_held_at_zero=(translation1 translation2 translation3)
          TransformAxis rotation1: coordinates=hip_flexion_r axis=(0 0 1) LinearFunction(coefficients=1 0)
          TransformAxis rotation2: coordinates=hip_adduction_r axis=(1 0 0) LinearFunction(coefficients=1 0)
          TransformAxis rotation3: coordinates=hip_rotation_r axis=(0 1 0) LinearFunction(coefficients=1 0)
    Body tibia_r: mass=3.581001 mass_center=(0 -0.1845572 0) inertia_xx=0.04756937 inertia_yy=0.00481357
        inertia_zz=0.04823005 meshes=(tibia.vtp fibula.vtp)
      CustomJoint knee_r: parent_body=femur_r location_in_parent=(0 0 0) location=(0 0 0)
        Coordinate knee_angle_r: motion_type=rotational default_value=0 initial_value=0 range=(-2.094395 0.1745329)
            clamped=true
        SpatialTransform: axes_held_at_zero=(rotation1 rotation2 translation3)
          TransformAxis rotation3: coordinates=knee_angle_r axis=(0 0 1) LinearFunction(coefficients=1 0)
          TransformAxis translation1: coordinates=knee_angle_r axis=(1 0 0)
            NaturalCubicSpline: x=(-2.094395 -1.745329 -1.396263 -1.047198 -0.6981317 -0.3490659 -0.1745329 0.1973442 0.337395 0.4901776 1.52146 2.094395)
                y=(-0.00367117 0.00205356 0.00471516 0.00470368 0.00243215 -0.00114724 -0.00355644 -0.00599662 -0.00623525 -0.00639472 -0.00623525 -0.00602301)
          TransformAxis translation2: coordinates=knee_angle_r axis=(0 1 0)
            NaturalCubicSpline: x=(-2.094395 -1.22173 -0.5235988 -0.3490659 -0.1745329 0.1591486 2.094395)
                y=(-0.4848236 -0.4683034 -0.4577488 -0.4561426 -0.4549954 -0.4534627 -0.454307)
    Body talus_r: mass=0.09658802 mass_center=(0 0 0) inertia_xx=0.00119861 inertia_yy=0.00119861 inertia_zz=0.00119861
        meshes=talus.vtp
      CustomJoint ankle_r: parent_body=tibia_r location_in_parent=(0 -0.4250649 0) location=(0 0 0)
        Coordinate ankle_angle_r: motion_type=rotational default_value=0 initial_value=0 range=(-1.570796 1.570796)
            clamped=true
        SpatialTransform: axes_held_at_zero=(rotation2 rotation3 translation1 translation2 translation3)
          TransformAxis rotation1: coordinates=ankle_angle_r axis=(-0.1050135 -0.1740224 0.9791263)
              LinearFunction(coefficients=1 0)
    Body calcn_r: mass=1.20735 mass_center=(0.1027085 0.03081254 0) inertia_xx=0.00142647 inertia_yy=0.00397375
        inertia_zz=0.00417753 meshes=foot.vtp
      CustomJoint subtalar_r: parent_body=talus_r location_in_parent=(-0.05432871 -0.04673138 0.00882271)
          location=(0 0 0)
        Coordinate subtalar_angle_r: motion_type=rotational default_value=0.00023951 initial_value=0.00023951
            range=(-1.570796 1.570796) clamped=true
        SpatialTransform: axes_held_at_zero=(rotation2 rotation3 translation1 translation2 translation3)
          TransformAxis rotation1: coordinates=subtalar_angle_r axis=(0.7871796 0.6047475 -0.1209495)
              LinearFunction(coefficients=1 0)
    Body toes_r: mass=0.2092096 mass_center=(0.03553713 0.00616251 -0.01797398) inertia_xx=0.00010189
        inertia_yy=0.00020378 inertia_zz=0.00030555 meshes=bofoot.vtp
      CustomJoint mtp_r: parent_body=calcn_r location_in_parent=(0.1836428 -0.00205417 0.00110925) location=(0 0 0)
        Coordinate mtp_angle_r: motion_type=rotational default_value=0 initial_value=0 range=(0 0) clamped=true
        SpatialTransform: axes_held_at_zero=(rotation2 rotation3 translation1 translation2 translation3)
          TransformAxis rotation1: coordinates=mtp_angle_r axis=(-0.5809544 0 0.8139361)
              LinearFunction(coefficients=1 0)
    Body femur_l: mass=8.984038 mass_center=(0 -0.1950308 0) inertia_xx=0.1702207 inertia_yy=0.04462096
        inertia_zz=0.1795009 meshes=l_femur.vtp
      CustomJoint hip_l: parent_body=pelvis location_in_parent=(-0.0724376 -0.06772454 -0.08555218) location=(0 0 0)
        Coordinate hip_flexion_l: motion_type=rotational default_value=0 initial_value=0 range=(-2.094395 2.094395)
            clamped=true
        Coordinate hip_adduction_l: motion_type=rotational default_value=0 initial_value=0 range=(-2.094395 2.094395)
            clamped=true
        Coordinate hip_rotation_l: motion_type=rotational default_value=0 initial_value=0 range=(-2.094395 2.094395)
            clamped=true
        SpatialTransform: axes_held_at_zero=(translation1 translation2 translation3)
          TransformAxis rotation1: coordinates=hip_flexion_l axis=(0 0 1) LinearFunction(coefficients=1 0)
          TransformAxis rotation2: coordinates=hip_adduction_l axis=(-1 0 0) LinearFunction(coefficients=1 0)
          TransformAxis rotation3: coordinates=hip_rotation_l axis=(0 -1 0) LinearFunction(coefficients=1 0)
    Body tibia_l: mass=3.581001 mass_center=(0 -0.1845572 0) inertia_xx=0.04756937 inertia_yy=0.00481357
        inertia_zz=0.04823005 meshes=(l_tibia.vtp l_fibula.vtp)
      CustomJoint knee_l: parent_body=femur_l location_in_parent=(0 0 0) location=(0 0 0)
        Coordinate knee_angle_l: motion_type=rotational default_value=0 initial_value=0 range=(-2.094395 0.1745329)
            clamped=true
        SpatialTransform: axes_held_at_zero=(rotation2 rotation3 translation3)
          TransformAxis rotation1: coordinates=knee_angle_l axis=(0 0 1) LinearFunction(coefficients=1 0)
          TransformAxis translation1: coordinates=knee_angle_l axis=(1 0 0)
            NaturalCubicSpline: x=(-2.094395 -1.745329 -1.396263 -1.047198 -0.6981317 -0.3490659 -0.1745329 0.1973442 0.337395 0.4901776 1.52146 2.094395)
                y=(-0.00367117 0.00205356 0.00471516 0.00470368 0.00243215 -0.00114724 -0.00355644 -0.00599662 -0.00623525 -0.00639472 -0.00623525 -0.00602301)
          TransformAxis translation2: coordinates=knee_angle_l axis=(0 1 0)
            NaturalCubicSpline: x=(-2.094395 -1.22173 -0.5235988 -0.3490659 -0.1745329 0.1591486 2.094395)
                y=(-0.4848236 -0.4683034 -0.4577488 -0.4561426 -0.4549954 -0.4534627 -0.454307)
    Body talus_l: mass=0.09658802 mass_center=(0 0 0) inertia_xx=0.00119861 inertia_yy=0.00119861 inertia_zz=0.00119861
        meshes=l_talus.vtp
      CustomJoint ankle_l: parent_body=tibia_l location_in_parent=(0 -0.4250649 0) location=(0 0 0)
        Coordinate ankle_angle_l: motion_type=rotational default_value=0 initial_value=0 range=(-1.047198 1.047198)
            clamped=true
        SpatialTransform: axes_held_at_zero=(rotation2 rotation3 translation1 translation2 translation3)
          TransformAxis rotation1: coordinates=ankle_angle_l axis=(0.1050135 0.1740224 0.9791263)
              LinearFunction(coefficients=1 0)
    Body calcn_l: mass=1.20735 mass_center=(0.1027085 0.03081254 0) inertia_xx=0.00142647 inertia_yy=0.00397375
        inertia_zz=0.00417753 meshes=l_foot.vtp
      CustomJoint subtalar_l: parent_body=talus_l location_in_parent=(-0.05432871 -0.04673138 -0.00882271)
          location=(0 0 0)
        Coordinate subtalar_angle_l: motion_type=rotational default_value=0 initial_value=0 range=(-1.570796 1.570796)
            clamped=true
        SpatialTransform: axes_held_at_zero=(rotation2 rotation3 translation1 translation2 translation3)
          TransformAxis rotation1: coordinates=subtalar_angle_l axis=(-0.7871796 -0.6047475 -0.1209495)
              LinearFunction(coefficients=1 0)
    Body toes_l: mass=0.2092096 mass_center=(0.03553713 0.00616251 0.01797398) inertia_xx=0.00010189
        inertia_yy=0.00020378 inertia_zz=0.00030555 meshes=l_bofoot.vtp
      CustomJoint mtp_l: parent_body=calcn_l location_in_parent=(0.1836428 -0.00205417 -0.00110925) location=(0 0 0)
        Coordinate mtp_angle_l: motion_type=rotational default_value=0 initial_value=0 range=(0 0) clamped=true
        SpatialTransform: axes_held_at_zero=(rotation2 rotation3 translation1 translation2 translation3)
          TransformAxis rotation1: coordinates=mtp_angle_l axis=(0.5809544 0 0.8139361)
              LinearFunction(coefficients=1 0)
    Body torso: mass=33.06845 mass_center=(-0.0323916 0.3455104 0) inertia_xx=1.660314 inertia_yy=0.8507069
        inertia_zz=1.611783 meshes=(hat_spine.vtp hat_jaw.vtp hat_skull.vtp hat_ribs.vtp)
      CustomJoint back: parent_body=pelvis location_in_parent=(-0.1031749 0.08350303 0) location=(0 0 0)
        Coordinate lumbar_extension: motion_type=rotational default_value=0 initial_value=0 range=(-1.570796 1.570796)
            clamped=true
        Coordinate lumbar_bending: motion_type=rotational default_value=0 initial_value=0 range=(-1.570796 1.570796)
            clamped=true
        Coordinate lumbar_rotation: motion_type=rotational default_value=0 initial_value=0 range=(-1.570796 1.570796)
            clamped=true
        SpatialTransform: axes_held_at_zero=(translation1 translation2 translation3)
          TransformAxis rotation1: coordinates=lumbar_extension axis=(0 0 1) LinearFunction(coefficients=1 0)
          TransformAxis rotation2: coordinates=lumbar_bending axis=(1 0 0) LinearFunction(coefficients=1 0)
          TransformAxis rotation3: coordinates=lumbar_rotation axis=(0 1 0) LinearFunction(coefficients=1 0)
  MarkerSet:
    Marker Sternum: torso (0.1204879 0.307161 -0.00325415)
    Marker R.Acromium: torso (-0.00065162 0.4291076 0.1658803)
    Marker L.Acromium: torso (-0.0010076 0.4403144 -0.1751482)
    Marker Top.Head: torso (0.09618572 0.6955114 0.00377827)
    Marker R.ASIS: pelvis (0.02342148 0.03628304 0.1308401)
    Marker L.ASIS: pelvis (0.02831302 0.0272876 -0.1312515)
    Marker V.Sacral: pelvis (-0.1725591 0.04028205 0.0070546)
    Marker R.Thigh.Upper: femur_r (0.04634099 -0.2198705 0.09188879)
    Marker R.Thigh.Front: femur_r (0.1084824 -0.2814198 -0.0006863)
    Marker R.Thigh.Rear: femur_r (0.03561661 -0.3405158 0.08192362)
    Marker R.Knee.Lat: femur_r (-0.00324464 -0.4259551 0.06143334)
    Marker R.Knee.Med: femur_r (0.00053937 -0.4428302 -0.05965725)
    Marker R.Shank.Upper: tibia_r (-0.02735051 -0.05973056 0.07022584)
    Marker R.Shank.Front: tibia_r (0.05100489 -0.09522922 0.01975761)
    Marker R.Shank.Rear: tibia_r (-0.01135933 -0.1451912 0.08031604)
    Marker R.Ankle.Lat: tibia_r (-0.00755805 -0.4304937 0.05548778)
    Marker R.Ankle.Med: tibia_r (0.00455313 -0.4160592 -0.0333568)
    Marker R.Heel: calcn_r (-0.02034258 0.01725088 -0.00558136)
    Marker R.Midfoot.Sup: calcn_r (0.1226653 0.03356966 -0.04042422)
    Marker R.Midfoot.Lat: calcn_r (0.1181867 0.00665462 0.06539408)
    Marker R.Toe.Lat: calcn_r (0.2088466 -0.01622024 0.07285127)
    Marker R.Toe.Med: calcn_r (0.2097438 0.00356087 -0.03453102)
    Marker R.Toe.Tip: calcn_r (0.2709039 0.0036034 -0.0031364)
    Marker L.Thigh.Upper: femur_l (0.02244783 -0.2067415 -0.09723255)
    Marker L.Thigh.Front: femur_l (0.1106123 -0.2488352 -0.03406858)
    Marker L.Thigh.Rear: femur_l (0.01511583 -0.315441 -0.0823868)
    Marker L.Knee.Lat: femur_l (-0.00864517 -0.4457674 -0.0641705)
    Marker L.Knee.Med: femur_l (0.00883426 -0.4459561 0.05080404)
    Marker L.Shank.Upper: tibia_l (-0.00634331 -0.0715332 -0.07941727)
    Marker L.Shank.Front: tibia_l (0.04520438 -0.1216054 -0.03085689)
    Marker L.Shank.Rear: tibia_l (-0.02463207 -0.1145204 -0.08793793)
    Marker L.Ankle.Lat: tibia_l (-0.00374142 -0.4284221 -0.05715249)
    Marker L.Ankle.Med: tibia_l (0.01302325 -0.4054301 0.03277413)
    Marker L.Heel: calcn_l (-0.02250338 0.02641887 0.00634089)
    Marker L.Midfoot.Sup: calcn_l (0.1493924 0.03636676 0.03459445)
    Marker L.Midfoot.Lat: calcn_l (0.133392 0.01776218 -0.06219725)
    Marker L.Toe.Lat: calcn_l (0.196296 -0.00665497 -0.06741377)
    Marker L.Toe.Med: calcn_l (0.2115868 0.01301084 0.03297501)
    Marker L.Toe.Tip: calcn_l (0.2614197 0.00990054 0.00899624)
