# OpenSim document version 40600
MarkerSet native_marker_demo:
  Marker Sternum: torso (0.14 0 0.1) fixed=true
  Marker R.ASIS: pelvis (0.08 -0.08 0) fixed=true
  Marker L.ASIS: pelvis (0.08 0.08 0) fixed=true
  Marker V.Sacral: pelvis (-0.1 0 0) fixed=true
  Marker R.Knee.Lat: femur_r (0 -0.06 -0.15) fixed=true
  Marker L.Knee.Lat: femur_l (0 0.06 -0.15) fixed=true
  Marker R.Ankle.Lat: tibia_r (0 -0.045 -0.15) fixed=true
  Marker L.Ankle.Lat: tibia_l (0 0.045 -0.15) fixed=true
  Marker R.Heel: calcn_r (-0.1 -0.03 0) fixed=true
  Marker L.Heel: calcn_l (-0.1 0.03 0) fixed=true
