# OpenSim document version 40600
MarkerSet:
  Marker Sternum: torso (0.1959361 0.2296437 0.0113356)
  Marker R.Acromium: torso (0.0852562 0.4956071 0.1770596)
  Marker L.Acromium: torso (0.132168 0.4951693 -0.1781773)
  Marker Top.Head: torso (0.1658135 0.6871677 -0.006400276)
  Marker R.ASIS: pelvis (0.01885281 0.03111514 0.114791)
  Marker L.ASIS: pelvis (0.02971264 0.0332787 -0.1183553)
  Marker V.Sacral: pelvis (-0.1559796 0.126366 -0.01006641)
  Marker R.Thigh.Upper: femur_r (-0.006462593 -0.2046588 0.09282307)
  Marker R.Thigh.Front: femur_r (-0.007363925 -0.281179 0.08142885)
  Marker R.Thigh.Rear: femur_r (0.03823275 -0.2699491 0.08118685)
  Marker R.Knee.Lat: femur_r (0.0005690903 -0.4258566 0.07060952)
  Marker R.Knee.Med: femur_r (-0.003851324 -0.4349988 -0.05489995)
  Marker R.Shank.Upper: tibia_r (-0.02080093 -0.1538299 0.08785982)
  Marker R.Shank.Front: tibia_r (0.02271322 -0.1613968 0.07291801)
  Marker R.Shank.Rear: tibia_r (-0.01948202 -0.22802 0.07163201)
  Marker R.Ankle.Lat: tibia_r (0.00125182 -0.4066603 0.0445542)
  Marker R.Ankle.Med: tibia_r (0.01348467 -0.396452 -0.0442813)
  Marker R.Heel: calcn_r (-0.02469625 0.0159121 0.005908317)
  Marker R.Toe.Lat: calcn_r (0.1798437 -0.03030213 0.0660589)
  Marker R.Toe.Med: calcn_r (0.2085385 -0.004569302 -0.04572913)
  Marker R.Toe.Tip: calcn_r (0.2187106 0.007136112 0.0003620887)
  Marker L.Thigh.Upper: femur_l (-0.01339043 -0.2074688 -0.09076011)
  Marker L.Thigh.Front: femur_l (-0.01536713 -0.2835361 -0.08087153)
  Marker L.Thigh.Rear: femur_l (0.02745098 -0.2746259 -0.08719419)
  Marker L.Knee.Lat: femur_l (0.00629261 -0.44251 -0.07326968)
  Marker L.Knee.Med: femur_l (-0.006835559 -0.4443445 0.05225362)
  Marker L.Shank.Upper: tibia_l (-0.01966539 -0.1505192 -0.08391856)
  Marker L.Shank.Front: tibia_l (0.02765609 -0.1569251 -0.07335521)
  Marker L.Shank.Rear: tibia_l (-0.01442839 -0.225598 -0.0686499)
  Marker L.Ankle.Lat: tibia_l (0.001067832 -0.4057008 -0.0419536)
  Marker L.Ankle.Med: tibia_l (0.0184894 -0.3933083 0.04867336)
  Marker L.Heel: calcn_l (-0.02475238 0.02253101 -0.003976859)
  Marker L.Toe.Lat: calcn_l (0.179303 -0.02507154 -0.06716617)
  Marker L.Toe.Med: calcn_l (0.2103915 -0.002767652 0.04358311)
  Marker L.Toe.Tip: calcn_l (0.2170242 0.007704335 -0.007235993)
